/COM,  ---------------------------------------------------------------------------------
/COM,   PROBLEM: MODAL ANALYSIS of the helicopter's TAIL BOOM
/COM,  ---------------------------------------------------------------------------------
/COM,   Natural frequencies and modal shapes of an helicopter's tail boom
/COM,  ---------------------------------------------------------------------------------

FINISH
/CLEAR, START, NEW
/FILNAM, ShellmodelRotor
/TITLE, Helicopter tail boom modal analysis shell model
/UNIT, SI
/INQUIRE, StrJobname, JOBNAME
*USE, testperson.mac

! >>>>> MODEL PARAMETERS <<<<<
*SET, Pi, ACOS(-1)		!Pi constant
*AFUN, DEG     			!Specify units for angular measures [DEG], specify after function *AFUN
*SET, eps, 10e-3		!precision interval

! >>>>> MATERIAL PROPERTIES <<<<<
!*** steel
*SET, SteelEyounG, 205e9			![Pa] Young's modulus
*SET, SteelNi, 0.29				!Poisson's ratio
*SET, SteelDensity, 7850			![Kg/m^3]

!*** Aluminium
*SET, AluminiumEyounG, 64e9 			![Pa] Young's modulus
*SET, AluminiumNi, 0.34				!Poisson's ratio
*SET, AluminiumDensity, 2700 			![Kg/m^3]

!*** Element size
*SET, E_length_ct, 50e-3			![m]

!geometric parameter
*SET, Lt, 5.2					![m] total tail lenght
*SET, RadBaseTail, 0.65/2			![m]
*SET, RadEndTail, 0.10/2			![m]
*SET, alpha, atan((RadBaseTail-RadEndTail)/Lt) 	![deg]

!geometric parameters section stiffner
*SET, StiffnerBase, 5e-3
*SET, StiffnerHeight, 5e-3

!geometric parameters section Horizzontal Stabilizer
*SET, HorizStabBase, 0.009
*SET, HorizStabHeigth, 0.0015

!geometric parameter mantle
*SET, ThichknessMantle, 5e-4 			![m]

!other parameters
*SET, NumberDivisonSurface, 24	!division cone's area

!change view - isometric
/VIEW,1,1,1,1
/ANG,1
/REP,FAST

/COM, -----------------------------------------------
/COM,  MODEL DEFINITION
/COM, -----------------------------------------------
! >>>> DEFINE GEOMETRY <<<<
! Reduced integration Timoshenko beam element, with quadratic shape functions
/PREP7
! Define axis rotation
K, 1, 0, 0, 0
K, 2, 5, 0, 0

! create keypoints
K, 3, 0, RadBaseTail, 0							!start keypoint tails
*GET, MaxKp, KP, 0, num, max 						!extract max keypoint
*SET, StartKpTail, MaxKp 						!store in variable
*DIM, SegmentRadius, ARRAY, 7, 1				!store in array radius of segment distance between 0 - Y before rotating
*DO, i, 1, 7, 1
	*GET, MaxKp, KP, 0, NUM, MAX 				!extract max keypoint
	K, MaxKp+1, Lt/7*i, RadBaseTail-Lt/7*i*tan(alpha), 0	!create keypoint
	SegmentRadius(i) = RadBaseTail-Lt/7*i*tan(alpha)
*ENDDO
*GET, MaxKp, KP, 0, num, max 						!extract max keypoint
*SET, EndKpTail, MaxKp							!store in variable end's tail

!define keypoint mantle'tail
K, Maxkp+1, 0, RadBaseTail, 0
*GET, StartKpMantle, KP, 0, num, max
K, MaxKp+2, Lt/7*i, RadEndTail, 0
*GET, EndKpMantle, KP, 0, num, max

*DO, j, StartKpTail, EndKpTail-1, 1
	L, j, j+1
*ENDDO
*GET, LenghtLineRference, LINE, 1, leng 				!extract lenght segment line's cone generator

! generate cone
*GET, NumberLine, line, 0, count 					!count lines
*GET, StartNumberLine, line, 0, num, min				!extract first number line
*GET, NumberLine, line, 0, count 					!count lines
*GET, StartNumberLine, line, 0, num, min				!extract first number line
LSEL, S, LOC, X, 0, Lt
AROTAT, ALL, , , , , , 1, 2, 360, NumberDivisonSurface			!generate cone

!divide line in array straight line and curved line
!to manage in next step meshing of elements
LSEL, S, LENGTH, , LenghtLineRference, LenghtLineRference
*VGET, StraighLine, LINE, , LLIST, , , 0
ALLSEL, ALL
LSEL, U, LENGTH, , LenghtLineRference, LenghtLineRference
*VGET, AcrLine, LINE, , LLIST, , , 0

*GET, StartNumberLine, line, 0, num, min
LSEL, ALL

! >>>> MESH <<<<
/ESHAPE, 1
!set material properties and element
ET, 1, BEAM189
KEYOPT, 1, 1, 1
KEYOPT, 1, 15, 1
MP, EX, 1, SteelEyounG
MP, NUXY, 1, SteelNi
MP, DENS, 1, SteelDensity

!***Horizzontal Stabilizer
SECTYPE,  1, BEAM, RECT, HorizzontalStabilizer, 0
SECOFFSET, CENT
SECDATA, HorizStabBase, HorizStabHeigth

*GET, LenghtStraighLine, 'PARM', StraighLine, DIM, X
LSEL, S, LINE, , StraighLine(1), StraighLine(LenghtStraighLine)
LESIZE, all, E_length_ct
LATT, 1, , 1, , , , 1
LMESH, ALL
LSEL, NONE
/ESHAPE, 1
/REPLO

!***stiffners
SECTYPE,  2, BEAM, RECT, Stiffeners, 0
SECOFFSET, ORIG
SECDATA, StiffnerBase, StiffnerHeight

*GET, LenghtAcrLine, 'PARM', AcrLine, DIM, X
LSEL, S, LINE, , AcrLine(1), AcrLine(LenghtAcrLine)
LESIZE, ALL, , , , 3
LATT, 1, , 1, , , , 2
LMESH, ALL
LSEL, NONE
/REPLO

!***Mantle
!set material properties and element
ET, 2, SHELL181
KEYOPT, 2, 3, 2
KEYOPT, 2, 8, 2

MP, EX, 2, AluminiumEyounG
MP, NUXY, 2, AluminiumNi
MP, DENS, 2, AluminiumDensity
SECT, 3, SHELL, , mantle
SECDATA, ThichknessMantle, 2, 0.0, 3
SECOFFSET, top

TYPE, 2
SECNUM, 3
AESIZE, ALL, E_length_ct,
MSHAPE, 0, 2D
MSHKEY, 1
AMESH, ALL


/COM, ------------------------------------------------
/COM,  COMPLETE MODEL
/COM, ------------------------------------------------

!Selct base keypoint and node
KSEL, S, LOC, X, 4.457143
KSEL, R, LOC, Y, 0.4464286E-01
KSEL, R, LOC, Z, -0.7732370E-01, 0.7732370E-01
*GET, BaseBearing1, KP, , NUM, MIN
*GET, BaseBearing2, KP, , NUM, MAX
ALLSEL,ALL

!create node for rigid link
*GET, LastNode, NODE, , NUM, MAX
N, LastNode + 1, kx(BaseBearing2), SegmentRadius(6)+50e-3, kz(BaseBearing2)
*GET, NodeBearing2, NODE, , NUM, MAX
*GET, LastNode, NODE, , NUM, MAX
N, LastNode + 1, kx(BaseBearing1), SegmentRadius(6)+50e-3, kz(BaseBearing1)
*GET, NodeBearing1, NODE, , NUM, MAX
*USE, distancenode.mac, NodeBearing1, NodeBearing2

!Set local systems
*USE, relativereferencesystem.mac, 1, 0, Lt/7*6, SegmentRadius(6)+50e-3, kz(BaseBearing1), , , 90
*USE, relativereferencesystem.mac, 2, 0, Lt/7*6, SegmentRadius(6)+50e-3, kz(BaseBearing2), , , 90

!Enter local system - z-positive
CSYS, LocalSystem_1

!create rotorblock
*USE, rotor.mac, NodeBearing1, NodeBearing2, DistancePoint, LocalSystem_1, LocalSystem_2

!return principal Reference system
CSYS, 0


/COM, -------------------------------------------------
/COM,  RIGID LINK
/COM,  create connection shfat and tail
/COM, -------------------------------------------------
!define element rigid link
*GET, LastElementType, ETYP, , NUM, MAX
*SET, RigidLink, LastElementType + 1
ET, RigidLink, MPC184
!0 - rigid link block 3 d.o.f (x, y, z)
!1 - beam block 6 d.o.f (x, y, z, rx, ry, rz)
KEYOPT, RigidLink, 1, 1
KEYOPT, RigidLink, 2, 0

!material for rigid link
*GET, MaterialNum, MAT, , NUM, MAX
*SET, RigidLinkMaterial, MaterialNum + 1
!MP, EX, RigidLinkMaterial, SteelEyounG
!MP, NUXY, RigidLinkMaterial, SteelNi
MP, DENS, RigidLinkMaterial,0
MAT, RigidLinkMaterial

!create element
TYPE, RigidLink
KSEL,S,KP,,BaseBearing1
NSLK,S
*GET, LastNode, NODE, , NUM, MAX
E, LastNode, NodeStart
ALLSEL,ALL
KSEL,S,KP,,BaseBearing2
NSLK,S
*GET, LastNode, NODE, , NUM, MAX
E, LastNode, NodeEnd

!clear parmaters
*SET, BaseBearing1,
*SET, BaseBearing2,
*SET, NodeBearing1,
*SET, NodeBearing2,
*SET, LastNode,
*SET, i,

!change view - isometric
EPLOT
/VIEW,1,1,1,1
/ANG,1
/REP,FAST

/COM, ------------------------------------------------
/COM,  BOUNDARY CONDITION
/COM, ------------------------------------------------
ALLSEL, ALL
LSEL, S, LOC, Y, -(RadBaseTail*2)+eps, (RadBaseTail*2)+eps
LSEL, S, LOC, x, 0, 0
*GET, MinBaseTailLine, line, 0, num, min
*GET, MaxBaseTailLine, line, 0, num, max
*DO, i, MinBaseTailLine, MaxBaseTailLine, 8
	DL, i, , ALL, 0
*ENDDO

!calc mass
*USE, calcmass.mac, StrJobname(1)
FINISH


/COM, ------------------------------------------------
/COM,  MODAL ANALISYS
/COM, ------------------------------------------------

! >>>>> ANALISYS PARAMETRS <<<<<
*SET, nmd, 10 		! Number of modes
*SET, nmspn, 8 		! Number of speeds
*SET, mxspn, 4000 	! Max Omega (rpm)

!get element component about a user-defined rotational
!in this case there is only one component
*GET, NumberComponet, 'COMP', , NCOMP
*GET, RotorBlock, 'COMP', NumberComponet, NAME

!get value for axis X1, Y1, Z1 <-> X2, Y2, Z2
*USE, getextremeaxis.mac

/SOLU
EQSLV, ICCG
DSPOPTION,SEQORDER,FORCE,4096,,PERFORMANCE
BCSOPTION,SEQORDER,FORCE,4096,,PERFORMANCE
OUTPR,ALL,ALL,
OUTRES,ALL,ALL,

!Setup modal run
ANTYPE, MODAL, NEW
CORIOLIS, ON, , , ON
MODOPT, QRDAMP, nmd, , , ON

*ABSET, Loop On Speed - progress: 0%, Bar
! Loop on speeds
*DO, i, 1, nmspn
	*SET, progress, i/nmspn*100
	spn = (i-1)*(mxspn/(nmspn-1))
	*SET, OMEGAX, spn
	*SET, OMEGAY, 0
	*SET, OMEGAZ, 0
	!CMOMEGA, CM_NAME, OMEGAX, OMEGAY, OMEGAZ, X1, Y1, Z1, X2, Y2, Z2
	/COM,===============================================
	/COM, CMOMEGA, %CM_Name%, %OMEGAX%, %OMEGAY%, %OMEGAZ%,
	/COM, %Node1CoorX%, %Node1CoorY%, %Node1CoorZ%,
	/COM, %Node2CoorX%, %Node2CoorY%, %Node2CoorZ%
	/COM,===============================================
	CMOMEGA, %CM_Name%, OMEGAX, OMEGAY, OMEGAZ, Node1CoorX, Node1CoorY, Node1CoorZ, Node2CoorX, Node2CoorY, Node2CoorZ
	MXPAND, nmd, , , YES
	BCSOPTION,,OUTOFCORE,,,PERFORMANCE
	SOLVE
	*ABCHECK, progress, Loop On Speed - progress: %progress% %
*ENDDO
*ABFINI
FINISH

*DIM,ModalFreq,ARRAY,10,1

/POST1
file,%StrJobname(1)%,rst
! Plot/List Campbell Diagrams
/GROPTS,VIEW,2
/YRANGE,0,100
/XRANGE,0,4000
/SHOW,PNG
/GFILE, 2400,
PLCAMP,,1,RPM,,%CM_Name%
*DO, z, 1, nmd, 1
	*GET, omegacamp, CAMP, z, FREQ, 1
	ModalFreq(z,1) = omegacamp
	*IF, z, gt, nmd-1, then
 		*GET, omegacamp, CAMP,z-1, FREQ, 2
 		ModalFreq(z,1) = omegacamp
 	*Endif
*ENDDO
PRCAMP,,1,RPM,,%CM_Name%
/SHOW,CLOSE

*CFOPEN, 'ModalFreq-%StrJobname(1)%', 'txt'
 *VWRITE, 'Num', 'Omega'
  (7x, A8, 3X, A8)
  *VWRITE, sequ, ModalFreq(1,1)
   (F12.0, F12.5)
*CFCLOS

! plot orbit
!SET,3,1
!PLORB
! animate whirl
set,3,1
PLNSOL,U,SUM
ANHARM
FINISH
